# Задание 1
Дано
# Радиус цилиндра | Высота цилиндра
R := 4 m
H := 2 m  # Площадь  # Объём
S := 2*π*R*H
V := π*R^2*H
# Ход решения:
# Площадь | Объём
S = 50.2655 m^2
V = 100531 L
# Задание 2
Дано
# Координаты точки M(x;y)
x := 3  # Расстояние от M(x;y) до O(0;0)
y := -9
R := sqrt(x^2 + y^2)
# Ход решения:
R = 9.48683
# Задание 3
Дано
x := 2
b := 2
β := 5
α := 0
ε := -3
t := 2.4
Y := (b^3 - 7*tan(|ε + β|))/(2*ln(x^4) - 5*tan(α^3))
f := ((3.8 + y)/(2 + t))^3 + 1*x*y^2/2
# Ход решения:
Y = 4.201
f = 79.3494
