# Дано | И нарисовать график
F(x) := x^3*sin(x^3) + 1
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i := 0 .. 20
x[i] := -2 + 0.2*i
F(x[i]) = [8.91487; -1.54294; -2.34222; 2.06248; 2.70669; 1.84147; 1.25084; 1.04629; 1.00409; 1.00006; 1; 1.00006; 1.00409; 1.04629; 1.25084; 1.84147; 2.70669; 2.06248; -2.34222; -1.54294; 8.91487]
i = [0; 1; 2; 3; 4; 5; 6; 7; 8; 9; 10; 11; 12; 13; 14; 15; 16; 17; 18; 19; 20]
x[i] = [-2; -1.8; -1.6; -1.4; -1.2; -1; -0.8; -0.6; -0.4; -0.2; 0; 0.2; 0.4; 0.6; 0.8; 1; 1.2; 1.4; 1.6; 1.8; 2]
Дано
f(x) := -x^3 + 9*x^2 - 24*x + 15  # И нарисовать график
i := 0 .. 20
x[i] := -10 + i
x[i] = [-10; -9; -8; -7; -6; -5; -4; -3; -2; -1; 0; 1; 2; 3; 4; 5; 6; 7; 8; 9; 10]
f(x[i]) = [2155; 1689; 1295; 967; 699; 485; 319; 195; 107; 49; 15; -1; -5; -3; -1; -5; -21; -55; -113; -201; -325]
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i = [0; 1; 2; 3; 4; 5; 6; 7; 8; 9; 10; 11; 12; 13; 14; 15; 16; 17; 18; 19; 20]
