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f(x) := -x^3 + 9*x^2 - 24*x + 18
integral(f(x), x) → 3*x^3 - x^4/4 - 12*x^2 + 18*x
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1.
f(x) := 3*x^4 - 5/(6*x^6) - 2/sqrt(x^3)
d/dx(f(x)) → 3*x^2/(x^3)^(3/2) + 12*x^3 + 5/x^7
x := 1
f(x) = 0.166667
d/dx(f(x)) = 20
2.
f(y) := (e^y + tan(y))*(ln(y) - 2)
d/dy(f(y)) → (e^y + tan(y))/y + (ln(y) - 2)*(tan(y)^2 + e^y + 1)
y := 1
f(y) = -8.55138
d/dy(f(y)) = -8.01191
3.
f(z) := tan(3^z - 5)
d/dz(f(z)) → 3^z*ln(3)*(tan(3^z - 5)^2 + 1)
z := 1
f(z) = 2.18504
d/dz(f(z)) = 19.0315
