g(x) :=
    sqrt(1 + |x|) if x ≤ 0
    (1 + 3*x)/(2 + nthroot(1 + |x|, 3)) if x > 0
z(x) :=
    if x == -1
        {
            break
        }
    (1 + 2*x + x^2)/(1 + x) if x < 0
    2*tan(x)^2/(1 + tan(x)^2) if 0 ≤ x ≤ 1
    cos(x)*e^(-x) if x > 1  # Построить функции y,g,z из Программирования
y(x) := (1 + x*e^(-x))/(2 + sqrt(1 - sin(x)^2))
# и графики
i := 0 .. 11
x[i] := -1.5 + 0.3*i
g(x[i]) = [1.58114; 1.48324; 1.3784; 1.26491; 1.14018; 1; 0.61461; 0.88339; 1.14248; 1.39369; 1.63827; 1.87713]
z(x[i]) = [-0.5; -0.2; 0.1; 0.4; 0.7; 0; 0.174664; 0.637642; 1.2272; 0.10914; 0.0157836; -0.0375563]
i = [0; 1; 2; 3; 4; 5; 6; 7; 8; 9; 10; 11]
x[i] = [-1.5; -1.2; -0.9; -0.6; -0.3; 0; 0.3; 0.6; 0.9; 1.2; 1.5; 1.8]
y(x[i]) = [-2.76352; -1.2632; -0.462938; -0.0330125; 0.201345; 0.333333; 0.413572; 0.470488; 0.521021; 0.576303; 0.644551; 0.582587]
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