# Задание 1
ORIGIN := 1
# Найти произведение только отрицательных из четырех данных чисел:
a := 2
b := 3
c := -4
d := -5
A := transpose([a, b, c, d])
f(A) :=
    [(n ← rows(A)), (P ← 1)]
    for i ∈ 1 .. n
        P ← P*A[i] if A[i] < 0
    return P
# Произведение чисел
f(A) = 20
ORIGIN := 1
# Задание 2
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a := 15268
A := [
    floor(a/10000);
    floor(a/1000) - 10*floor(a/10000);
    floor(a/100) - 100*floor(a/10000) - 10*(floor(a/1000) - 10*floor(a/10000));
    floor(a/10) - 1000*floor(a/10000) - 100*(floor(a/1000) - 10*floor(a/10000)) - 10*(floor(a/100) - 100*floor(a/10000) - 10*(floor(a/1000) - 10*floor(a/10000)));
    a - 10000*floor(a/10000) - 1000*(floor(a/1000) - 10*floor(a/10000)) - 100*(floor(a/100) - 100*floor(a/10000) - 10*(floor(a/1000) - 10*floor(a/10000))) - 10*(floor(a/10) - 1000*floor(a/10000) - 100*(floor(a/1000) - 10*floor(a/10000)) - 10*(floor(a/100) - 100*floor(a/10000) - 10*(floor(a/1000) - 10*floor(a/10000))))
]
g(A) :=
    [(m ← rows(A)), (min ← A[1, 1])]
    for i ∈ 1 .. m
        min ← A[i, 1] if min > A[i, 1]
    return min
A = [1; 5; 2; 6; 8]
# Самая маленькая цифра
g(A) = 1
