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Дано
ORIGIN := 1
f(A) :=
    [(min ← A[1, 1]), (max ← A[2, 1])]
    [(k ← min), (min ← max), (max ← k)] if max < min
    for i ∈ 1, 2 .. 10
        min ← A[i, 1] if A[i, 1] < min
        max ← A[i, 1] if A[i, 1] > max
    raz ← max - min
    return raz
A := [2.5; -6.1; 50; 5.6; 9.99; -0.45; 5.6; 5.5; -7; 0]
# Разность между min и max равна
f(A) = 57
