y(x) :=
    0 if x == 0
    otherwise
        (x + 4)/sin(x) if -1 < x ≤ 10
    (x^3 + sin(x)) if x ≤ -1
    sum(n!/(3*n)^n, n = 1 .. 25) if 10 < x < 20
    x^3 + sqrt(x) if x ≥ 20
f(o, z) :=
    0 if o^2 + z^2 ≥ 1
    ln(1 - o^2 - z^2) otherwise
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o := -1, -0.9 .. 1
z := -1, -0.9 .. 1
o = [-1; -0.9; -0.8; -0.7; -0.6; -0.5; -0.4; -0.3; -0.2; -0.1; 0; 0.1; 0.2; 0.3; 0.4; 0.5; 0.6; 0.7; 0.8; 0.9; 1]
z = [-1; -0.9; -0.8; -0.7; -0.6; -0.5; -0.4; -0.3; -0.2; -0.1; 0; 0.1; 0.2; 0.3; 0.4; 0.5; 0.6; 0.7; 0.8; 0.9; 1]
f(o, z) = [
    0; 0; 0; 0; 0; 0; 0; 0; 0; 0
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]
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# [component: inputs f]
x := -5, -4 .. 25
x = [
    -5; -4; -3; -2; -1; 0; 1; 2; 3; 4
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]
y(x) = [
    -124.041; -63.2432; -27.1411; -8.9093; -1.84147; 0; 5.94198; 6.5985; 49.6032; -10.5708
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]
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