ORIGIN := 1
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A := [8, 4, 5, 28; 24, 16, 64, 2; 8.5, 21.33, 0.8890, 2.079; 65.60, 4.5, -0.6667, 6]
B := [0, 1, 0, 0; 1, 0, 0, 0; 0, 0, 1, 0; 0, 0, 0, 1]
C := [0, 1, 0, 0; 1, 0, 0, 0; 0, 0, 1, 0; 0, 0, 0, 1]
A*B = [4, 8, 5, 28; 16, 24, 64, 2; 21.33, 8.5, 0.889, 2.079; 4.5, 65.6, -0.6667, 6]
C*A = [24, 16, 64, 2; 8, 4, 5, 28; 8.5, 21.33, 0.889, 2.079; 65.6, 4.5, -0.6667, 6]
B := [0, 1, 0, 0]
C := [0; 0; 0; 1]
B*A = [24, 16, 64, 2]
A*C = [28; 2; 2.079; 6]
transpose(A*C) + B*A = [52, 18, 66.079, 8]
