Given
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6.1*x[1] + 6.2*x[2] - 6.3*x[3] + 6.4*x[4] == 6.5
A := [6.1, 6.2, 6.3, 6.4; 1.1, -1.5, 2.2, -3.8; 5.1, -5.0, 4.9, -4.8; 1.8, 1.9, 2, -2.1]
B := [6.5; 4.2; 4.7; 2.2]
1.1*x[1] - 1.5*x[2] + 2.2*x[3] - 3.8*x[4] == 4.2
5.1*x[1] - 5.0*x[2] + 4.9*x[3] - 4.8*x[4] == 4.7
1.8*x[1] + 1.9*x[2] + 2*x[3] - 2.1*x[4] == 2.2
Δ := |A|
Δ = -271.892
Δ1 := det([6.5, 6.2, 6.3, 6.4; 4.2, -1.5, 2.2, -3.8; 4.7, -5.0, 4.9, -4.8; 2.2, 1.9, 2, -2.1]) = 498.213
Δ2 := det([6.1, 6.5, 6.3, 6.4; 1.1, 4.2, 2.2, -3.8; 5.1, 4.7, 4.9, -4.8; 1.8, 2.2, 2, -2.1]) = 15.8976
Δ4 := det([6.1, 6.2, 6.3, 6.5; 1.1, -1.5, 2.2, 4.2; 5.1, -5.0, 4.9, 4.7; 1.8, 1.9, 2, 2.2]) = -7.74
Δ3 := det([6.1, 6.2, 6.5, 6.4; 1.1, -1.5, 4.2, -3.8; 5.1, -5.0, 4.7, -4.8; 1.8, 1.9, 2.2, -2.1]) = -770.702
x[1] := Δ1/Δ = -1.83239
x[2] := Δ2/Δ = -0.0584704
x[3] := Δ3/Δ = 2.83459
x[4] := Δ4/Δ = 0.0284672
X := [x[1]; x[2]; x[3]; x[4]] = [-1.83239; -0.0584704; 2.83459; 0.0284672]
A*X = [6.5; 4.2; 4.7; 2.2]
