С := [7.5, 1.8, -2.1, -7.7; -10, 1.3, -20, -1.4; 2.8, -1.7, 3.9, 4.8; 10, 31.4, -2.1, -10]
B := [1.1; 1.5; 1.2; -1.1]
A := [
    0, -1.8/7.5, 2.1/7.5, 7.7/7.5;
    10/1.3, 0, 20/1.3, 1.4/1.3;
    -2.8/3.9, 1.7/3.9, 0, 4.8/3.9;
    1, 3.14, -0.21, 0
]
b := [1.1/7.5; 1.5/1.3; 1.2/3.9; 1.1/10]
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norm1(A) = 15.8746
norm2(A) = 17.2408
norme(A) = 17.6446
normi(A) = 24.1538
x[:, 0] := b
k := 1 .. 10
x[:, k] := b + A*x[:, k - 1]
x = [
    0.146667, 0.0688308, 2.58672, 20.9114, 30.5016, 416.502, 2014.74, 5541.45, 53207, 209786, 877401;
    1.15385, 7.13424, 18.7263, 169.234, 752.372, 2864.01, 20789.5, 84807, 405677, 2464124, 10221568;
    0.307692, 0.840736, 8.06361, 34.1872, 132.668, 977.429, 3860.71, 18944.4, 114814, 468304, 2527084;
    0.11, 3.81513, 22.4038, 59.804, 545.238, 2365.2, 9204.34, 66483.2, 267857, 1302921, 7848790
]
ε := |x[:, 10] - x[:, 9]|/|x[:, 10]|
ε = 0.788506
Given
7.5*x1 + 1.8*x2 - 2.1*x3 - 7.7*x4 == 1.1
-10*x1 + 1.3*x2 - 20*x3 - 1.4*x4 == 1.5
2.8*x1 - 1.7*x2 + 3.9*x3 + 4.8*x4 == 1.2
10*x1 + 31.4*x2 - 2.1*x3 - 10*x4 == -1.1
X := Find(x1, x2, x3, x4) → [0.338019663685; -0.0842796843726; -0.266238417903; 0.239291522514]
С*X = [1.1; 1.5; 1.2; -1.1]
X = [0.33802; -0.0842797; -0.266238; 0.239292]
